// SBML level 3 version 2

model KP_model()
  // model units - time: hour

  // Compartments:
  compartment central = 1 liter;

  // Species:
  species drug in central = 0;  // substance in mg

  // Parameters:
  bacterial_count_adapted = 1 cfu_per_ml;
  bacterial_count_susceptible = 1 cfu_per_ml;
  death_rate = 1 per_hour;
  elimination_rate = 1 per_hour;
  growth_rate = 1 per_hour;
  kappa = 1 liter_per_mg_hour;
  transition_rate_12 = 1 per_hour;
  transition_rate_21 = 1 liter_per_mg_hour;
  total_bacterial_count has cfu_per_ml;

  // Assignment rules:
  total_bacterial_count := bacterial_count_susceptible + bacterial_count_adapted;

  // Rate rules:
  bacterial_count_susceptible' = (growth_rate - (transition_rate_21*drug + kappa*drug))*bacterial_count_susceptible + transition_rate_12*bacterial_count_adapted;
  bacterial_count_adapted' = bacterial_count_susceptible*transition_rate_21*drug - (death_rate + transition_rate_12)*bacterial_count_adapted;

  // Reactions:
  central_reaction: drug => ; central*elimination_rate*drug;

  // Unit definitions:
  unit cfu_per_ml = item / liter;
  unit mg_per_liter = 1e-3 gram / liter;
  unit hour = 3600 second;
  unit mg = 1e-3 gram;
  unit liter_per_mg_hour = liter / (1e-3 gram * 3600 second);
  unit per_hour = 1 / (3600 second);
end
