// SBML level 3 version 2

model K_model()
  // model units - time: hour

  // Compartments:
  compartment central = 1 liter;

  // Species:
  species drug in central = 0;  // substance in mg

  // Parameters:
  total_bacterial_count has cfu_per_ml;
  bacterial_count_1 = 1 cfu_per_ml;
  bacterial_count_2 = 1 cfu_per_ml;
  concentration_e50 = 1 mg_per_liter;
  death_rate = 1 per_hour;
  elimination_rate = 1 per_hour;
  gamma = 1 dimensionless;
  growth_rate = 1 per_hour;
  kappa = 1 per_hour;
  transition_rate_12 = 1 liter_per_mg_hour;
  transition_rate_21 = 1 per_hour;

  // Assignment rules:
  total_bacterial_count := bacterial_count_1 + bacterial_count_2;

  // Rate rules:
  bacterial_count_1' = (growth_rate - (transition_rate_21*drug + kappa*(drug^gamma/(drug^gamma + concentration_e50^gamma))))*bacterial_count_1 + transition_rate_12*bacterial_count_2;
  bacterial_count_2' = drug*transition_rate_21*bacterial_count_1 - (death_rate + transition_rate_12)*bacterial_count_2;

  // Reactions:
  central_reaction: drug => ; central*elimination_rate*drug;

  // Unit definitions:
  unit cfu_per_ml = item / liter;
  unit mg_per_liter = 1e-3 gram / liter;
  unit hour = 3600 second;
  unit mg = 1e-3 gram;
  unit liter_per_mg_hour = liter / (1e-3 gram * 3600 second);
  unit per_hour = 1 / (3600 second);
end
